a0_c0_b0 := .3
a0 := .6
a0_c0_b0 := .3
c0 := .7
a0_c0_b1 := 0
a1 := 0
a0_c0_b1 := .7
c1 := .3
a0_c1_b0 := .1
a0_c1_b0 := .1
a0_c1_b1 := 0
a0_c1_b1 := .9
a1_c0_b0 := .8
a1_c0_b0 := .8
a1_c0_b1 := 0
a1_c0_b1 := .2
a1_c1_b0 := .5
a1_c1_b0 := .5
a1_c1_b1 := 0
a1_c1_b1 := .5
p_a0_c0_b0 := a0*a0_c0_b0*c0 = 0.126
p_a0_c0_b1 := a0*a0_c0_b1*c0 = 0.294
p_a0_c1_b0 := a0*a0_c1_b0*c1 = 0.018
p_a0_c1_b1 := a0*a0_c1_b1*c1 = 0.162
p_a1_c0_b0 := a1*a1_c0_b0*c0 = 0
p_a1_c0_b1 := a1*a1_c0_b1*c0 = 0
p_a1_c1_b0 := a1*a1_c1_b0*c1 = 0
p_a1_c1_b1 := a1*a1_c1_b1*c1 = 0
p_a0_c0_b0/(p_a0_c0_b0 + a0_c0_b1) = 0.152542
P := [p_a0_c0_b0; p_a0_c0_b1; p_a0_c1_b0; p_a0_c1_b1; p_a1_c0_b0; p_a1_c0_b1; p_a1_c1_b0; p_a1_c1_b1]
a0_c0_b1/(p_a0_c0_b0 + a0_c0_b1) = 0.847458
Z := sum(P) = 0.6
p_a0 := (p_a0_c0_b0 + p_a0_c0_b1 + p_a0_c1_b0 + p_a0_c1_b1)/Z = 1
p_a1 := (p_a1_c0_b0 + p_a1_c0_b1 + p_a1_c1_b0 + p_a1_c1_b1)/Z = 0
p_b0 := (p_a0_c0_b0 + p_a0_c1_b0 + p_a1_c0_b0 + p_a1_c1_b0)/Z = 0.24
p_b1 := (p_a0_c0_b1 + p_a0_c1_b1 + p_a1_c0_b1 + p_a1_c1_b1)/Z = 0.76
p_c0 := (p_a0_c0_b0 + p_a0_c0_b1 + p_a1_c0_b0 + p_a1_c0_b1)/Z = 0.7
p_c1 := (p_a0_c1_b0 + p_a0_c1_b1 + p_a1_c1_b0 + p_a1_c1_b1)/Z = 0.3
x_0 := .3
y_0 := .2
x_1 := .7
y_1 := .8
z_0 := x_0*y_0*x_1 = 0.042
x_0*y_0*x_1 = 0.042
z_1 := x_1*y_1*x_0 = 0.168
z_0 + z_1 = 0.21
z_0/(z_0 + z_1) = 0.2
z_1/(z_0 + z_1) = 0.8
